# OpenSim document version 40000
Model gait10dof18musc_MusclePolynomials:
  SmoothSphereHalfSpaceForce contactSphereHeel_r: socket_sphere_frame=/bodyset/calcn_r socket_half_space_frame=/ground
      contact_sphere_location=(0.03130753 0.01043584 0) contact_sphere_radius=0.035 contact_half_space_location=(0 0 0)
      contact_half_space_orientation=(0 0 -1.570796) stiffness=3067776 [N/m^2] dissipation=2 [s/m] static_friction=0.8
      dynamic_friction=0.8 viscous_friction=0.5 transition_velocity=0.2 [m/s] derivative_smoothing=1e-5
      hertz_smoothing=300 hunt_crossley_smoothing=50
  SmoothSphereHalfSpaceForce contactSphereHeel_l: socket_sphere_frame=/bodyset/calcn_l socket_half_space_frame=/ground
      contact_sphere_location=(0.03130753 0.01043584 0) contact_sphere_radius=0.035 contact_half_space_location=(0 0 0)
      contact_half_space_orientation=(0 0 -1.570796) stiffness=3067776 dissipation=2 static_friction=0.8
      dynamic_friction=0.8 viscous_friction=0.5 transition_velocity=0.2 derivative_smoothing=1e-5 hertz_smoothing=300
      hunt_crossley_smoothing=50
  SmoothSphereHalfSpaceForce contactSphereFront_r: socket_sphere_frame=/bodyset/calcn_r socket_half_space_frame=/ground
      contact_sphere_location=(0.1774093 -0.01565376 0.005217921) contact_sphere_radius=0.015
      contact_half_space_location=(0 0 0) contact_half_space_orientation=(0 0 -1.570796) stiffness=3067776
      dissipation=2 static_friction=0.8 dynamic_friction=0.8 viscous_friction=0.5 transition_velocity=0.2
      derivative_smoothing=1e-5 hertz_smoothing=300 hunt_crossley_smoothing=50
  SmoothSphereHalfSpaceForce contactSphereFront_l: socket_sphere_frame=/bodyset/calcn_l socket_half_space_frame=/ground
      contact_sphere_location=(0.1774093 -0.01565376 -0.005217921) contact_sphere_radius=0.015
      contact_half_space_location=(0 0 0) contact_half_space_orientation=(0 0 -1.570796) stiffness=3067776
      dissipation=2 static_friction=0.8 dynamic_friction=0.8 viscous_friction=0.5 transition_velocity=0.2
      derivative_smoothing=1e-5 hertz_smoothing=300 hunt_crossley_smoothing=50
  CoordinateActuator lumbarAct: min_control=-150 max_control=150 coordinate=lumbar optimal_force=1
  DeGrooteFregly2016Muscle [values shared by the 18 below unless stated]: min_control=0.01 max_control=1
      max_contraction_velocity=10 ignore_tendon_compliance=true activation_time_constant=0.015
      deactivation_time_constant=0.06 default_activation=0.01 active_force_width_scale=1 fiber_damping=0.01
      tendon_strain_at_one_norm_force=0.049 ignore_passive_fiber_force=false use_approximation=false
  DeGrooteFregly2016Muscle hamstrings_r: approximation_coordinates=(/jointset/hip_r/hip_flexion_r /jointset/knee_r/knee_angle_r)
      use_approximation=true max_isometric_force=2700 optimal_fiber_length=0.1090593 tendon_slack_length=0.3261773
      pennation_angle_at_optimal=0 [radians]
    PathPoint bifemlh_r-P1: pelvis (-0.121645 -0.0990559 0.0684676)
    PathPoint bifemlh_r-P2: tibia_r (-0.0290986 -0.0348024 0.0284509)
    PathPoint bifemlh_r-P3: tibia_r (-0.0226215 -0.054427 0.0331589)
    length_approximation: MultivariatePolynomialFunction: coefficients=(0.4204952 0.02875525 -0.01830017 -0.006995444 0.05369059 0.002092858 0.001164874 0.01679996 0.0001886801 -0.009576338)
        dimension=2 order=3
  DeGrooteFregly2016Muscle bifemsh_r: approximation_coordinates=/jointset/knee_r/knee_angle_r max_isometric_force=804
      optimal_fiber_length=0.1718723 tendon_slack_length=0.08841986 pennation_angle_at_optimal=0.4014257
    PathPoint P1: femur_r (0.00501373 -0.211679 0.0234642)
    PathPoint P2: tibia_r (-0.0290986 -0.0348024 0.0284509)
    PathPoint P3: tibia_r (-0.0226215 -0.054427 0.0331589)
    length_approximation: MultivariatePolynomialFunction: coefficients=(0.2449164 0.02184687 -0.02095007 -0.006400712)
        dimension=1 order=3
  DeGrooteFregly2016Muscle glut_max_r: approximation_coordinates=/jointset/hip_r/hip_flexion_r max_isometric_force=1944
      optimal_fiber_length=0.1547784 tendon_slack_length=0.07230884 pennation_angle_at_optimal=0
    PathPoint P1: pelvis (-0.127188 0.00840194 0.045553)
    PathPoint P2: pelvis (-0.129795 -0.0588136 0.0801615)
    PathPoint P3: femur_r (-0.0451235 -0.0585603 0.0252692)
    PathPoint P4: femur_r (-0.0156428 -0.101879 0.042015)
    length_approximation: MultivariatePolynomialFunction: coefficients=(0.2013841 0.0565298 -0.001007248 -0.01304476 0.004357279)
        dimension=1 order=4
  DeGrooteFregly2016Muscle iliopsoas_r: approximation_coordinates=/jointset/hip_r/hip_flexion_r
      max_isometric_force=2342 optimal_fiber_length=0.09749959 tendon_slack_length=0.1559993
      pennation_angle_at_optimal=0.1396263
    PathPoint psoas_r-P1: pelvis (-0.0624834 0.0856611 0.0284953)
    PathPoint psoas_r-P2: pelvis (-0.0229846 -0.0550472 0.0748371)
    ConditionalPathPoint psoas_r-P3: pelvis (-0.0278133 -0.077742 0.0804573) range=(-1.5708 0.785398)
        coordinate=hip_flexion_r socket_coordinate=/jointset/hip_r/hip_flexion_r
    PathPoint psoas_r-P4: femur_r (0.00160439 -0.0508392 0.00381043)
    PathPoint psoas_r-P5: femur_r (-0.0188516 -0.0598639 0.0104285)
    length_approximation: MultivariatePolynomialFunction: coefficients=(0.2541567 -0.03823003 -0.005210532 0.002534168)
        dimension=1 order=3
  DeGrooteFregly2016Muscle rect_fem_r: approximation_coordinates=(/jointset/hip_r/hip_flexion_r /jointset/knee_r/knee_angle_r)
      max_isometric_force=1169 optimal_fiber_length=0.1141544 tendon_slack_length=0.3104199
      pennation_angle_at_optimal=0.08726646
    PathPoint P1: pelvis (-0.0284893 -0.0300345 0.0954444)
    ConditionalPathPoint P2: femur_r (0.0334917 -0.404106 0.00190522) range=(-2.61799 -1.45997)
        socket_coordinate=/jointset/knee_r/knee_angle_r
    MovingPathPoint P3: tibia_r (0.0597031 0.0202859 0.00135343) socket_x_coordinate=/jointset/knee_r/knee_angle_r
        socket_y_coordinate=/jointset/knee_r/knee_angle_r socket_z_coordinate=/jointset/knee_r/knee_angle_r
      x_location: MultiplierFunction: scale=0.9667322
        SimmSpline: x=(-2.0944 -1.99997 -1.5708 -1.45752 -1.39626 -1.0472 -0.698132 -0.526391 -0.349066 -0.174533 0 0.00017453 0.00034907 0.0279253 0.0872665 0.174533 2.0944)
            y=(0.0155805 0.0179938 0.0275081 0.0296564 0.0307615 0.0365695 0.0422074 0.0450902 0.048391 0.0534299 0.0617576 0.0617669 0.0617762 0.0633083 0.066994 0.0733035 0.0573481)
      y_location: MultiplierFunction: scale=0.9667322
        SimmSpline: x=(-2.0944 -1.99997 -1.5708 -1.45752 -1.39626 -1.0472 -0.698132 -0.526391 -0.349066 -0.174533 0 0.00017453 0.00034907 0.0279253 0.0872665 0.174533 2.0944)
            y=(0.0234116 0.0237613 0.0251141 0.0252795 0.0253146 0.0249184 0.0242373 0.0238447 0.0234197 0.0227644 0.020984 0.0209814 0.0209788 0.0205225 0.0191754 0.0159554 -0.0673774)
      z_location: MultiplierFunction: scale=0.9667322
        SimmSpline: x=(-2.0944 0.1745) y=(0.0014 0.0014)
    length_approximation: MultivariatePolynomialFunction: coefficients=(0.4110412 -0.04190129 0.01545508 0.03534383 0.01905257 0.003490517 -0.04119856 -0.00249517 -0.001467645 -0.0008011396 -0.0002062908 -0.01467163 0.001472709 0.0004702572 2.278862e-5 0.00554493 0.0002921883 6.068964e-5 0.001214861 -4.506103e-5 -0.0001110737)
        dimension=2 order=5
  DeGrooteFregly2016Muscle vasti_r: approximation_coordinates=/jointset/knee_r/knee_angle_r max_isometric_force=5000
      optimal_fiber_length=0.1077088 tendon_slack_length=0.1167684 pennation_angle_at_optimal=0.05235988
    PathPoint vas_int_r-P1: femur_r (0.0290796 -0.192928 0.0310851)
    PathPoint vas_int_r-P2: femur_r (0.033592 -0.208972 0.0285782)
    ConditionalPathPoint vas_int_r-P3: femur_r (0.0343942 -0.404106 0.0055151) range=(-2.61799 -1.42)
        socket_coordinate=/jointset/knee_r/knee_angle_r
    MovingPathPoint vas_int_r-P4: tibia_r (0.0536181 0.0244509 0.00174012)
        socket_x_coordinate=/jointset/knee_r/knee_angle_r socket_y_coordinate=/jointset/knee_r/knee_angle_r
        socket_z_coordinate=/jointset/knee_r/knee_angle_r
      x_location: MultiplierFunction: scale=0.9667322
        SimmSpline: x=(-2.0944 -1.99997 -1.5708 -1.45752 -1.39626 -1.0472 -0.698132 -0.526391 -0.349066 -0.174533 0 0.00017453 0.00034907 0.0279253 0.0872665 0.174533 2.0944)
            y=(0.0082733 0.0106866 0.0202042 0.022353 0.0234583 0.0292715 0.0349465 0.037871 0.0412569 0.0465287 0.0554632 0.0554735 0.0554837 0.0571717 0.061272 0.0684368 0.0648818)
      y_location: MultiplierFunction: scale=0.9667322
        SimmSpline: x=(-2.0944 -1.99997 -1.5708 -1.45752 -1.39626 -1.0472 -0.698132 -0.526391 -0.349066 -0.174533 0 0.00017453 0.00034907 0.0279253 0.0872665 0.174533 2.0944)
            y=(0.025599 0.0259487 0.0273124 0.0274796 0.0275151 0.0271363 0.0265737 0.0263073 0.0261187 0.0260129 0.0252923 0.0252911 0.0252898 0.0250526 0.0242191 0.0218288 -0.0685706)
      z_location: MultiplierFunction: scale=0.9667322
        SimmSpline: x=(-2.0944 2.0944) y=(0.0018 0.0018)
    length_approximation: MultivariatePolynomialFunction: coefficients=(0.1842153 -0.04008449 -0.006524542 0.0003197778)
        dimension=1 order=3
  DeGrooteFregly2016Muscle gastroc_r: approximation_coordinates=(/jointset/knee_r/knee_angle_r /jointset/ankle_r/ankle_angle_r)
      max_isometric_force=2500 optimal_fiber_length=0.08692608 tendon_slack_length=0.3477043
      pennation_angle_at_optimal=0.296706
    PathPoint med_gas_r-P1: femur_r (-0.0190522 -0.393979 -0.0235645)
    ConditionalPathPoint med_gas_r-P2: femur_r (-0.0300824 -0.403304 -0.0258708) range=(-0.785398 0.174533)
        socket_coordinate=/jointset/knee_r/knee_angle_r
    PathPoint med_gas_r-P3: calcn_r (0 0.0283317 -0.0048438)
    length_approximation: MultivariatePolynomialFunction: coefficients=(0.4349309 0.04398815 -0.005155012 -0.006729667 0.02537714 0.0003450898 0.0007482682 0.007819367 -3.278791e-5 6.958181e-5)
        dimension=2 order=3
  DeGrooteFregly2016Muscle soleus_r: approximation_coordinates=/jointset/ankle_r/ankle_angle_r max_isometric_force=5137
      optimal_fiber_length=0.04817055 tendon_slack_length=0.2408528 pennation_angle_at_optimal=0.4363323
    PathPoint P1: tibia_r (-0.00232016 -0.1482 0.0068638)
    PathPoint P2: calcn_r (0 0.0283317 -0.0048438)
    length_approximation: MultivariatePolynomialFunction: coefficients=(0.2806594 0.04268227 -0.007031378 -0.006261792)
        dimension=1 order=3
  DeGrooteFregly2016Muscle tib_ant_r: approximation_coordinates=/jointset/ankle_r/ankle_angle_r
      max_isometric_force=3000 optimal_fiber_length=0.09378992 tendon_slack_length=0.2134199
      pennation_angle_at_optimal=0.08726646
    PathPoint P1: tibia_r (0.0173045 -0.156997 0.0111174)
    PathPoint P2: tibia_r (0.0318055 -0.381956 -0.0171112)
    PathPoint P3: calcn_r (0.106564 0.0162679 -0.0278747)
    length_approximation: MultivariatePolynomialFunction: coefficients=(0.2906116 -0.04392095 -0.004349865 0.003846472)
        dimension=1 order=3
  DeGrooteFregly2016Muscle hamstrings_l: approximation_coordinates=(/jointset/hip_l/hip_flexion_l /jointset/knee_l/knee_angle_l)
      max_isometric_force=2700 optimal_fiber_length=0.1090593 tendon_slack_length=0.3261773
      pennation_angle_at_optimal=0
    PathPoint bifemlh_l-P1: pelvis (-0.121645 -0.0990559 -0.0684676)
    PathPoint bifemlh_l-P2: tibia_l (-0.0290986 -0.0348024 -0.0284509)
    PathPoint bifemlh_l-P3: tibia_l (-0.0226215 -0.054427 -0.0331589)
    length_approximation: MultivariatePolynomialFunction: coefficients=(0.4204952 0.02875525 -0.01830017 -0.006995444 0.05369059 0.002092858 0.001164874 0.01679996 0.0001886801 -0.009576338)
        dimension=2 order=3
  DeGrooteFregly2016Muscle bifemsh_l: approximation_coordinates=/jointset/knee_l/knee_angle_l max_isometric_force=804
      optimal_fiber_length=0.1718723 tendon_slack_length=0.08841986 pennation_angle_at_optimal=0.4014257
    PathPoint P1: femur_l (0.00501373 -0.211679 -0.0234642)
    PathPoint P2: tibia_l (-0.0290986 -0.0348024 -0.0284509)
    PathPoint P3: tibia_l (-0.0226215 -0.054427 -0.0331589)
    length_approximation: MultivariatePolynomialFunction: coefficients=(0.2449164 0.02184687 -0.02095007 -0.006400712)
        dimension=1 order=3
  DeGrooteFregly2016Muscle glut_max_l: approximation_coordinates=/jointset/hip_l/hip_flexion_l max_isometric_force=1944
      optimal_fiber_length=0.1547784 tendon_slack_length=0.07230884 pennation_angle_at_optimal=0
    PathPoint P1: pelvis (-0.127188 0.00840194 -0.045553)
    PathPoint P2: pelvis (-0.129795 -0.0588136 -0.0801615)
    PathPoint P3: femur_l (-0.0451235 -0.0585603 -0.0252692)
    PathPoint P4: femur_l (-0.0156428 -0.101879 -0.042015)
    length_approximation: MultivariatePolynomialFunction: coefficients=(0.2013841 0.0565298 -0.001007248 -0.01304476 0.004357279)
        dimension=1 order=4
  DeGrooteFregly2016Muscle iliopsoas_l: approximation_coordinates=/jointset/hip_l/hip_flexion_l
      max_isometric_force=2342 optimal_fiber_length=0.09749959 tendon_slack_length=0.1559993
      pennation_angle_at_optimal=0.1396263
    PathPoint psoas_l-P1: pelvis (-0.0624834 0.0856611 -0.0284953)
    PathPoint psoas_l-P2: pelvis (-0.0229846 -0.0550472 -0.0748371)
    ConditionalPathPoint psoas_l-P3: pelvis (-0.0278133 -0.077742 -0.0804573) range=(-1.5708 0.785398)
        socket_coordinate=/jointset/hip_l/hip_flexion_l
    PathPoint psoas_l-P4: femur_l (0.00160439 -0.0508392 -0.00381043)
    PathPoint psoas_l-P5: femur_l (-0.0188516 -0.0598639 -0.0104285)
    length_approximation: MultivariatePolynomialFunction: coefficients=(0.2541567 -0.03823003 -0.005210532 0.002534168)
        dimension=1 order=3
  DeGrooteFregly2016Muscle rect_fem_l: approximation_coordinates=(/jointset/hip_l/hip_flexion_l /jointset/knee_l/knee_angle_l)
      max_isometric_force=1169 optimal_fiber_length=0.1141544 tendon_slack_length=0.3104199
      pennation_angle_at_optimal=0.08726646
    PathPoint P1: pelvis (-0.0284893 -0.0300345 -0.0954444)
    ConditionalPathPoint P2: femur_l (0.0334917 -0.404106 -0.00190522) range=(-2.61799 -1.45997)
        socket_coordinate=/jointset/knee_l/knee_angle_l
    MovingPathPoint P3: tibia_l (0.0597031 0.0202859 -0.00135343) socket_x_coordinate=/jointset/knee_l/knee_angle_l
        socket_y_coordinate=/jointset/knee_l/knee_angle_l socket_z_coordinate=/jointset/knee_l/knee_angle_l
      x_location: MultiplierFunction: scale=0.9667322
        SimmSpline: x=(-2.0944 -1.99997 -1.5708 -1.45752 -1.39626 -1.0472 -0.698132 -0.526391 -0.349066 -0.174533 0 0.00017453 0.00034907 0.0279253 0.0872665 0.174533 2.0944)
            y=(0.0155805 0.0179938 0.0275081 0.0296564 0.0307615 0.0365695 0.0422074 0.0450902 0.048391 0.0534299 0.0617576 0.0617669 0.0617762 0.0633083 0.066994 0.0733035 0.0573481)
      y_location: MultiplierFunction: scale=0.9667322
        SimmSpline: x=(-2.0944 -1.99997 -1.5708 -1.45752 -1.39626 -1.0472 -0.698132 -0.526391 -0.349066 -0.174533 0 0.00017453 0.00034907 0.0279253 0.0872665 0.174533 2.0944)
            y=(0.0234116 0.0237613 0.0251141 0.0252795 0.0253146 0.0249184 0.0242373 0.0238447 0.0234197 0.0227644 0.020984 0.0209814 0.0209788 0.0205225 0.0191754 0.0159554 -0.0673774)
      z_location: MultiplierFunction: scale=0.9667322
        SimmSpline: x=(-2.0944 0.1745) y=(-0.0014 -0.0014)
    length_approximation: MultivariatePolynomialFunction: coefficients=(0.4110412 -0.04190129 0.01545508 0.03534383 0.01905257 0.003490517 -0.04119856 -0.00249517 -0.001467645 -0.0008011396 -0.0002062908 -0.01467163 0.001472709 0.0004702572 2.278862e-5 0.00554493 0.0002921883 6.068964e-5 0.001214861 -4.506103e-5 -0.0001110737)
        dimension=2 order=5
  DeGrooteFregly2016Muscle vasti_l: approximation_coordinates=/jointset/knee_l/knee_angle_l max_isometric_force=5000
      optimal_fiber_length=0.1077088 tendon_slack_length=0.1167684 pennation_angle_at_optimal=0.05235988
    PathPoint vas_int_l-P1: femur_l (0.0290796 -0.192928 -0.0310851)
    PathPoint vas_int_l-P2: femur_l (0.033592 -0.208972 -0.0285782)
    ConditionalPathPoint vas_int_l-P3: femur_l (0.0343942 -0.404106 -0.0055151) range=(-2.61799 -1.42)
        socket_coordinate=/jointset/knee_l/knee_angle_l
    MovingPathPoint vas_int_l-P4: tibia_l (0.0536181 0.0244509 -0.00174012)
        socket_x_coordinate=/jointset/knee_l/knee_angle_l socket_y_coordinate=/jointset/knee_l/knee_angle_l
        socket_z_coordinate=/jointset/knee_l/knee_angle_l
      x_location: MultiplierFunction: scale=0.9667322
        SimmSpline: x=(-2.0944 -1.99997 -1.5708 -1.45752 -1.39626 -1.0472 -0.698132 -0.526391 -0.349066 -0.174533 0 0.00017453 0.00034907 0.0279253 0.0872665 0.174533 2.0944)
            y=(0.0082733 0.0106866 0.0202042 0.022353 0.0234583 0.0292715 0.0349465 0.037871 0.0412569 0.0465287 0.0554632 0.0554735 0.0554837 0.0571717 0.061272 0.0684368 0.0648818)
      y_location: MultiplierFunction: scale=0.9667322
        SimmSpline: x=(-2.0944 -1.99997 -1.5708 -1.45752 -1.39626 -1.0472 -0.698132 -0.526391 -0.349066 -0.174533 0 0.00017453 0.00034907 0.0279253 0.0872665 0.174533 2.0944)
            y=(0.025599 0.0259487 0.0273124 0.0274796 0.0275151 0.0271363 0.0265737 0.0263073 0.0261187 0.0260129 0.0252923 0.0252911 0.0252898 0.0250526 0.0242191 0.0218288 -0.0685706)
      z_location: MultiplierFunction: scale=0.9667322
        SimmSpline: x=(-2.0944 2.0944) y=(-0.0018 -0.0018)
    length_approximation: MultivariatePolynomialFunction: coefficients=(0.1842153 -0.04008449 -0.006524542 0.0003197778)
        dimension=1 order=3
  DeGrooteFregly2016Muscle gastroc_l: approximation_coordinates=(/jointset/knee_l/knee_angle_l /jointset/ankle_l/ankle_angle_l)
      max_isometric_force=2500 optimal_fiber_length=0.08692608 tendon_slack_length=0.3477043
      pennation_angle_at_optimal=0.296706
    PathPoint med_gas_l-P1: femur_l (-0.0190522 -0.393979 0.0235645)
    ConditionalPathPoint med_gas_l-P2: femur_l (-0.0300824 -0.403304 0.0258708) range=(-0.785398 0.174533)
        socket_coordinate=/jointset/knee_l/knee_angle_l
    PathPoint med_gas_l-P3: calcn_l (0 0.0283317 0.0048438)
    length_approximation: MultivariatePolynomialFunction: coefficients=(0.4349309 0.04398815 -0.005155012 -0.006729667 0.02537714 0.0003450898 0.0007482682 0.007819367 -3.278791e-5 6.958181e-5)
        dimension=2 order=3
  DeGrooteFregly2016Muscle soleus_l: approximation_coordinates=/jointset/ankle_l/ankle_angle_l max_isometric_force=5137
      optimal_fiber_length=0.04817055 tendon_slack_length=0.2408528 pennation_angle_at_optimal=0.4363323
    PathPoint P1: tibia_l (-0.00232016 -0.1482 -0.0068638)
    PathPoint P2: calcn_l (0 0.0283317 0.0048438)
    length_approximation: MultivariatePolynomialFunction: coefficients=(0.2806594 0.04268227 -0.007031378 -0.006261792)
        dimension=1 order=3
  DeGrooteFregly2016Muscle tib_ant_l: approximation_coordinates=/jointset/ankle_l/ankle_angle_l
      max_isometric_force=3000 optimal_fiber_length=0.09378992 tendon_slack_length=0.2134199
      pennation_angle_at_optimal=0.08726646
    PathPoint P1: tibia_l (0.0173045 -0.156997 -0.0111174)
    PathPoint P2: tibia_l (0.0318055 -0.381956 0.0171112)
    PathPoint P3: calcn_l (0.106564 0.0162679 0.0278747)
    length_approximation: MultivariatePolynomialFunction: coefficients=(0.2906116 -0.04392095 -0.004349865 0.003846472)
        dimension=1 order=3
  Ground
  BodySet:
    Body pelvis: mass=9.714334 [kg] mass_center=(-0.0682778 0 0) inertia=(0.08149288 0.08149288 0.04454276 0 0 0)
        meshes=(r_pelvis.vtp l_pelvis.vtp sacrum.vtp)
    Body femur_l: mass=7.672319 mass_center=(0 -0.170467 0) inertia=(0.1110555 0.02911163 0.11711 0 0 0)
        meshes=l_femur.vtp
    Body femur_r: mass=7.672319 mass_center=(0 -0.170467 0) inertia=(0.1110555 0.02911163 0.11711 0 0 0)
        meshes=r_femur.vtp
    Body tibia_l: mass=3.058155 mass_center=(0 -0.180489 0) inertia=(0.0388527 0.003931523 0.03939232 0 0 0)
        meshes=(l_tibia.vtp l_fibula.vtp)
    Body tibia_r: mass=3.058155 mass_center=(0 -0.180489 0) inertia=(0.0388527 0.003931523 0.03939232 0 0 0)
        meshes=(r_tibia.vtp r_fibula.vtp)
    Body talus_l: mass=0.08248564 mass_center=(0 0 0) inertia=(0.0006889677 0.0006889677 0.0006889677 0 0 0)
        meshes=l_talus.vtp
    Body talus_r: mass=0.08248564 mass_center=(0 0 0) inertia=(0.0006889677 0.0006889677 0.0006889677 0 0 0)
        meshes=r_talus.vtp
    Body calcn_l: mass=1.03107 mass_center=(0.0913924 0.0274177 0) inertia=(0.0009645548 0.002686974 0.002824768 0 0 0)
        meshes=l_foot.vtp
    Body calcn_r: mass=1.03107 mass_center=(0.0913924 0.0274177 0) inertia=(0.0009645548 0.002686974 0.002824768 0 0 0)
        meshes=r_foot.vtp
    Body toes_l: mass=0.1786639 mass_center=(0.0316218 0.00548355 0.0159937)
        inertia=(6.889677e-5 0.0001377935 6.889677e-5 0 0 0) meshes=l_bofoot.vtp
    Body toes_r: mass=0.1786639 mass_center=(0.0316218 0.00548355 -0.0159937)
        inertia=(6.889677e-5 0.0001377935 6.889677e-5 0 0 0) meshes=r_bofoot.vtp
    Body torso: mass=28.24028 mass_center=(-0.0289722 0.309037 0) inertia=(1.140436 0.5934009 1.140436 0 0 0)
        meshes=(hat_spine.vtp hat_jaw.vtp hat_skull.vtp hat_ribs.vtp)
  JointSet:
    PlanarJoint groundPelvis: socket_parent_frame=ground_offset socket_child_frame=pelvis_offset
      Coordinate pelvis_tilt: range=(-1.570796 1.570796)
      Coordinate pelvis_tx: range=(-5 5)
      Coordinate pelvis_ty: range=(-3 3)
      PhysicalOffsetFrame ground_offset: socket_parent=/ground translation=(0 0 0) [meters]
      PhysicalOffsetFrame pelvis_offset: socket_parent=/bodyset/pelvis translation=(0 0 0)
    PinJoint hip_l: socket_parent_frame=pelvis_offset socket_child_frame=femur_l_offset
      Coordinate hip_flexion_l: range=(-1.047198 2.094395)
      PhysicalOffsetFrame pelvis_offset: socket_parent=/bodyset/pelvis translation=(-0.0682778 -0.0638354 -0.08233069)
      PhysicalOffsetFrame femur_l_offset: socket_parent=/bodyset/femur_l translation=(0 0 0)
    PinJoint hip_r: socket_parent_frame=pelvis_offset socket_child_frame=femur_r_offset
      Coordinate hip_flexion_r: range=(-1.047198 2.094395)
      PhysicalOffsetFrame pelvis_offset: socket_parent=/bodyset/pelvis translation=(-0.0682778 -0.0638354 0.08233069)
      PhysicalOffsetFrame femur_r_offset: socket_parent=/bodyset/femur_r translation=(0 0 0)
    PinJoint knee_l: socket_parent_frame=femur_l_offset socket_child_frame=tibia_l_offset
      Coordinate knee_angle_l: range=(-2.094395 0.1745329)
      PhysicalOffsetFrame femur_l_offset: socket_parent=/bodyset/femur_l translation=(-0.004512212 -0.3969072 0)
      PhysicalOffsetFrame tibia_l_offset: socket_parent=/bodyset/tibia_l translation=(0 0 0)
    PinJoint knee_r: socket_parent_frame=femur_r_offset socket_child_frame=tibia_r_offset
      Coordinate knee_angle_r: range=(-2.094395 0.1745329)
      PhysicalOffsetFrame femur_r_offset: socket_parent=/bodyset/femur_r translation=(-0.004512212 -0.3969072 0)
      PhysicalOffsetFrame tibia_r_offset: socket_parent=/bodyset/tibia_r translation=(0 0 0)
    PinJoint ankle_l: socket_parent_frame=tibia_l_offset socket_child_frame=talus_l_offset
      Coordinate ankle_angle_l: range=(-0.6981317 0.5235988)
      PhysicalOffsetFrame tibia_l_offset: socket_parent=/bodyset/tibia_l translation=(0 -0.4156948 0)
      PhysicalOffsetFrame talus_l_offset: socket_parent=/bodyset/talus_l translation=(0 0 0)
    PinJoint ankle_r: socket_parent_frame=tibia_r_offset socket_child_frame=talus_r_offset
      Coordinate ankle_angle_r: range=(-0.6981317 0.5235988)
      PhysicalOffsetFrame tibia_r_offset: socket_parent=/bodyset/tibia_r translation=(0 -0.4156948 0)
      PhysicalOffsetFrame talus_r_offset: socket_parent=/bodyset/talus_r translation=(0 0 0)
    WeldJoint subtalar_l: socket_parent_frame=talus_l_offset socket_child_frame=calcn_l_offset
      PhysicalOffsetFrame talus_l_offset: socket_parent=/bodyset/talus_l
          translation=(-0.04457209 -0.03833913 -0.007238281)
      PhysicalOffsetFrame calcn_l_offset: socket_parent=/bodyset/calcn_l translation=(0 0 0)
    WeldJoint subtalar_r: socket_parent_frame=talus_r_offset socket_child_frame=calcn_r_offset
      PhysicalOffsetFrame talus_r_offset: socket_parent=/bodyset/talus_r
          translation=(-0.04457209 -0.03833913 0.007238281)
      PhysicalOffsetFrame calcn_r_offset: socket_parent=/bodyset/calcn_r translation=(0 0 0)
    WeldJoint mtp_l: socket_parent_frame=calcn_l_offset socket_child_frame=toes_l_offset
      PhysicalOffsetFrame calcn_l_offset: socket_parent=/bodyset/calcn_l
          translation=(0.1634097 -0.001827849 -0.0009870383)
      PhysicalOffsetFrame toes_l_offset: socket_parent=/bodyset/toes_l translation=(0 0 0)
    WeldJoint mtp_r: socket_parent_frame=calcn_r_offset socket_child_frame=toes_r_offset
      PhysicalOffsetFrame calcn_r_offset: socket_parent=/bodyset/calcn_r
          translation=(0.1634097 -0.001827849 0.0009870383)
      PhysicalOffsetFrame toes_r_offset: socket_parent=/bodyset/toes_r translation=(0 0 0)
    PinJoint lumbar: socket_parent_frame=pelvis_offset socket_child_frame=torso_offset
      Coordinate lumbar: range=(-1.570796 1.570796)
      PhysicalOffsetFrame pelvis_offset: socket_parent=/bodyset/pelvis translation=(-0.09724999 0.07870779 0)
      PhysicalOffsetFrame torso_offset: socket_parent=/bodyset/torso translation=(0 0 0)
