# OpenSim document version 40000
Model gait_2D:
  SmoothSphereHalfSpaceForce contactSphereHeel_r: socket_sphere_frame=/bodyset/calcn_r socket_half_space_frame=/ground
      contact_sphere_location=(0.03130753 0.01043584 0) contact_sphere_radius=0.035 contact_half_space_location=(0 0 0)
      contact_half_space_orientation=(0 0 -1.570796) stiffness=3067776 [N/m^2] dissipation=2 [s/m] static_friction=0.8
      dynamic_friction=0.8 viscous_friction=0.5 transition_velocity=0.2 [m/s] derivative_smoothing=1e-5
      hertz_smoothing=300 hunt_crossley_smoothing=50
  SmoothSphereHalfSpaceForce contactSphereHeel_l: socket_sphere_frame=/bodyset/calcn_l socket_half_space_frame=/ground
      contact_sphere_location=(0.03130753 0.01043584 0) contact_sphere_radius=0.035 contact_half_space_location=(0 0 0)
      contact_half_space_orientation=(0 0 -1.570796) stiffness=3067776 dissipation=2 static_friction=0.8
      dynamic_friction=0.8 viscous_friction=0.5 transition_velocity=0.2 derivative_smoothing=1e-5 hertz_smoothing=300
      hunt_crossley_smoothing=50
  SmoothSphereHalfSpaceForce contactSphereFront_r: socket_sphere_frame=/bodyset/calcn_r socket_half_space_frame=/ground
      contact_sphere_location=(0.1774093 -0.01565376 0.005217921) contact_sphere_radius=0.015
      contact_half_space_location=(0 0 0) contact_half_space_orientation=(0 0 -1.570796) stiffness=3067776
      dissipation=2 static_friction=0.8 dynamic_friction=0.8 viscous_friction=0.5 transition_velocity=0.2
      derivative_smoothing=1e-5 hertz_smoothing=300 hunt_crossley_smoothing=50
  SmoothSphereHalfSpaceForce contactSphereFront_l: socket_sphere_frame=/bodyset/calcn_l socket_half_space_frame=/ground
      contact_sphere_location=(0.1774093 -0.01565376 -0.005217921) contact_sphere_radius=0.015
      contact_half_space_location=(0 0 0) contact_half_space_orientation=(0 0 -1.570796) stiffness=3067776
      dissipation=2 static_friction=0.8 dynamic_friction=0.8 viscous_friction=0.5 transition_velocity=0.2
      derivative_smoothing=1e-5 hertz_smoothing=300 hunt_crossley_smoothing=50
  CoordinateActuator [values shared by the 10 below unless stated]: min_control=-150 max_control=150 optimal_force=1
  CoordinateActuator groundPelvisAct_rz: coordinate=groundPelvis_q_rz
  CoordinateActuator groundPelvisAct_tx: coordinate=groundPelvis_q_tx
  CoordinateActuator groundPelvisAct_ty: coordinate=groundPelvis_q_ty
  CoordinateActuator hipAct_l: coordinate=hip_q_l
  CoordinateActuator hipAct_r: coordinate=hip_q_r
  CoordinateActuator kneeAct_l: coordinate=knee_q_l
  CoordinateActuator kneeAct_r: coordinate=knee_q_r
  CoordinateActuator ankleAct_l: coordinate=ankle_q_l
  CoordinateActuator ankleAct_r: coordinate=ankle_q_r
  CoordinateActuator lumbarAct: coordinate=lumbar_q
  Ground: meshes=treadmill.vtp
  BodySet:
    Body pelvis: mass=9.714334 [kg] mass_center=(-0.0682778 0 0) inertia=(0.08149288 0.08149288 0.04454276 0 0 0)
        meshes=(r_pelvis.vtp l_pelvis.vtp sacrum.vtp)
    Body femur_l: mass=7.672319 mass_center=(0 -0.170467 0) inertia=(0.1110555 0.02911163 0.11711 0 0 0)
        meshes=l_femur.vtp
    Body femur_r: mass=7.672319 mass_center=(0 -0.170467 0) inertia=(0.1110555 0.02911163 0.11711 0 0 0)
        meshes=r_femur.vtp
    Body tibia_l: mass=3.058155 mass_center=(0 -0.180489 0) inertia=(0.0388527 0.003931523 0.03939232 0 0 0)
        meshes=(l_tibia.vtp l_fibula.vtp)
    Body tibia_r: mass=3.058155 mass_center=(0 -0.180489 0) inertia=(0.0388527 0.003931523 0.03939232 0 0 0)
        meshes=(r_tibia.vtp r_fibula.vtp)
    Body talus_l: mass=0.08248564 mass_center=(0 0 0) inertia=(0.0006889677 0.0006889677 0.0006889677 0 0 0)
        meshes=l_talus.vtp
    Body talus_r: mass=0.08248564 mass_center=(0 0 0) inertia=(0.0006889677 0.0006889677 0.0006889677 0 0 0)
        meshes=r_talus.vtp
    Body calcn_l: mass=1.03107 mass_center=(0.0913924 0.0274177 0) inertia=(0.0009645548 0.002686974 0.002824768 0 0 0)
        meshes=l_foot.vtp
      PhysicalOffsetFrame ballCenter2: socket_parent=.. translation=(0.03130753 0.01043584 0) [meters]
        Sphere ballCenter2_geom_1: radius=0.035
      PhysicalOffsetFrame ballCenter4: socket_parent=.. translation=(0.1774093 -0.01565376 -0.005217921)
        Sphere ballCenter4_geom_1: radius=0.015
    Body calcn_r: mass=1.03107 mass_center=(0.0913924 0.0274177 0) inertia=(0.0009645548 0.002686974 0.002824768 0 0 0)
        meshes=r_foot.vtp
      PhysicalOffsetFrame ballCenter1: socket_parent=.. translation=(0.03130753 0.01043584 0)
        Sphere ballCenter1_geom_1: radius=0.035
      PhysicalOffsetFrame ballCenter3: socket_parent=.. translation=(0.1774093 -0.01565376 0.005217921)
        Sphere ballCenter3_geom_1: radius=0.015
    Body toes_l: mass=0.1786639 mass_center=(0.0316218 0.00548355 0.0159937)
        inertia=(6.889677e-5 0.0001377935 6.889677e-5 0 0 0) meshes=l_bofoot.vtp
    Body toes_r: mass=0.1786639 mass_center=(0.0316218 0.00548355 -0.0159937)
        inertia=(6.889677e-5 0.0001377935 6.889677e-5 0 0 0) meshes=r_bofoot.vtp
    Body torso: mass=28.24028 mass_center=(-0.0289722 0.309037 0) inertia=(1.140436 0.5934009 1.140436 0 0 0)
        meshes=(hat_spine.vtp hat_jaw.vtp hat_skull.vtp hat_ribs.vtp)
  JointSet:
    PlanarJoint groundPelvis: socket_parent_frame=ground_offset socket_child_frame=pelvis_offset
      Coordinate groundPelvis_q_rz: range=(-0.3490659 -0.1745329)
      Coordinate groundPelvis_q_tx: range=(0 1)
      Coordinate groundPelvis_q_ty: range=(0.75 1.25)
      PhysicalOffsetFrame ground_offset: socket_parent=/ground translation=(0 0 0)
      PhysicalOffsetFrame pelvis_offset: socket_parent=/bodyset/pelvis translation=(0 0 0)
    PinJoint hip_l: socket_parent_frame=pelvis_offset socket_child_frame=femur_l_offset
      Coordinate hip_q_l: range=(-0.1745329 1.047198)
      PhysicalOffsetFrame pelvis_offset: socket_parent=/bodyset/pelvis translation=(-0.0682778 -0.0638354 -0.08233069)
      PhysicalOffsetFrame femur_l_offset: socket_parent=/bodyset/femur_l translation=(0 0 0)
    PinJoint hip_r: socket_parent_frame=pelvis_offset socket_child_frame=femur_r_offset
      Coordinate hip_q_r: range=(-0.1745329 1.047198)
      PhysicalOffsetFrame pelvis_offset: socket_parent=/bodyset/pelvis translation=(-0.0682778 -0.0638354 0.08233069)
      PhysicalOffsetFrame femur_r_offset: socket_parent=/bodyset/femur_r translation=(0 0 0)
    PinJoint knee_l: socket_parent_frame=femur_l_offset socket_child_frame=tibia_l_offset
      Coordinate knee_q_l: range=(-0.8726646 0)
      PhysicalOffsetFrame femur_l_offset: socket_parent=/bodyset/femur_l translation=(-0.004512212 -0.3969072 0)
      PhysicalOffsetFrame tibia_l_offset: socket_parent=/bodyset/tibia_l translation=(0 0 0)
    PinJoint knee_r: socket_parent_frame=femur_r_offset socket_child_frame=tibia_r_offset
      Coordinate knee_q_r: range=(-0.8726646 0)
      PhysicalOffsetFrame femur_r_offset: socket_parent=/bodyset/femur_r translation=(-0.004512212 -0.3969072 0)
      PhysicalOffsetFrame tibia_r_offset: socket_parent=/bodyset/tibia_r translation=(0 0 0)
    PinJoint ankle_l: socket_parent_frame=tibia_l_offset socket_child_frame=talus_l_offset
      Coordinate ankle_q_l: range=(-0.2617994 0.4363323)
      PhysicalOffsetFrame tibia_l_offset: socket_parent=/bodyset/tibia_l translation=(0 -0.4156948 0)
      PhysicalOffsetFrame talus_l_offset: socket_parent=/bodyset/talus_l translation=(0 0 0)
    PinJoint ankle_r: socket_parent_frame=tibia_r_offset socket_child_frame=talus_r_offset
      Coordinate ankle_q_r: range=(-0.2617994 0.4363323)
      PhysicalOffsetFrame tibia_r_offset: socket_parent=/bodyset/tibia_r translation=(0 -0.4156948 0)
      PhysicalOffsetFrame talus_r_offset: socket_parent=/bodyset/talus_r translation=(0 0 0)
    WeldJoint subtalar_l: socket_parent_frame=talus_l_offset socket_child_frame=calcn_l_offset
      PhysicalOffsetFrame talus_l_offset: socket_parent=/bodyset/talus_l
          translation=(-0.04457209 -0.03833913 -0.007238281)
      PhysicalOffsetFrame calcn_l_offset: socket_parent=/bodyset/calcn_l translation=(0 0 0)
    WeldJoint subtalar_r: socket_parent_frame=talus_r_offset socket_child_frame=calcn_r_offset
      PhysicalOffsetFrame talus_r_offset: socket_parent=/bodyset/talus_r
          translation=(-0.04457209 -0.03833913 0.007238281)
      PhysicalOffsetFrame calcn_r_offset: socket_parent=/bodyset/calcn_r translation=(0 0 0)
    WeldJoint mtp_l: socket_parent_frame=calcn_l_offset socket_child_frame=toes_l_offset
      PhysicalOffsetFrame calcn_l_offset: socket_parent=/bodyset/calcn_l
          translation=(0.1634097 -0.001827849 -0.0009870383)
      PhysicalOffsetFrame toes_l_offset: socket_parent=/bodyset/toes_l translation=(0 0 0)
    WeldJoint mtp_r: socket_parent_frame=calcn_r_offset socket_child_frame=toes_r_offset
      PhysicalOffsetFrame calcn_r_offset: socket_parent=/bodyset/calcn_r
          translation=(0.1634097 -0.001827849 0.0009870383)
      PhysicalOffsetFrame toes_r_offset: socket_parent=/bodyset/toes_r translation=(0 0 0)
    PinJoint lumbar: socket_parent_frame=pelvis_offset socket_child_frame=torso_offset
      Coordinate lumbar_q: range=(0 0.3490659)
      PhysicalOffsetFrame pelvis_offset: socket_parent=/bodyset/pelvis translation=(-0.09724999 0.07870779 0)
      PhysicalOffsetFrame torso_offset: socket_parent=/bodyset/torso translation=(0 0 0)
